// SBML level 3 version 2

model biocrnpyler_657964()
  // model units - substance: mole, time: second, volume: litre, area: square_metre, length: metre, extent: mole

  // Compartments:
  compartment default = 1e-6;

  // Species:
  species A in default = 0;
  species B in default = 0;
  species C in default = 0;
  species D in default = 0;
  species E in default = 0;

  // Reactions:
  r0: A => C; r0_k_forward*A;
    r0_k_forward = 1;
  r1: B => C; r1_k_forward*B;
    r1_k_forward = 1;
  r2: C => ; r2_k_forward*C;
    r2_k_forward = 1;
  r3: B => D; r3_k_forward*B;
    r3_k_forward = 1;
  r4: A => ; r4_k_forward*A;
    r4_k_forward = 1;
  r5: D => ; r5_k_forward*D;
    r5_k_forward = 1;
  r6: A + B => E; r6_k_forward*A*B;
    r6_k_forward = 1;
  r7: E => ; r7_k_forward*E;
    r7_k_forward = 1;

  // Unit definitions:
  unit square_metre = metre^2;
end
